# OpenSim document version 20302
AnalyzeTool Analysis:
  replace_force_set: false
  results_directory: ../AnalyzeResults
  output_precision: 8
  initial_time: 0.8
  final_time: 1.18
  solve_for_equilibrium_for_auxiliary_states: false
  maximum_number_of_integrator_steps: 20000
  maximum_integrator_step_size: 1
  minimum_integrator_step_size: 0.00000001
  integrator_error_tolerance: 0.00001
  coordinates_file: ../subject01_walk1_ik.mot
  lowpass_cutoff_frequency_for_coordinates: -1
  AnalysisSet Analyses:
    MuscleAnalysis: start_time=0.8 end_time=1.18 step_interval=1 in_degrees=true muscle_list=all
        moment_arm_coordinate_list=all compute_moments=true
