# OpenSim document version 30000
AnalyzeTool model_scaled:
  model_file: model.osim
  replace_force_set: false
  force_set_files: actuators.xml
  results_directory: ./ResultsSO
  output_precision: 8
  initial_time: 2.41
  final_time: 3.48
  solve_for_equilibrium_for_auxiliary_states: true
  maximum_number_of_integrator_steps: 20000
  maximum_integrator_step_size: 1
  minimum_integrator_step_size: 1e-8
  integrator_error_tolerance: 1e-5
  lowpass_cutoff_frequency_for_coordinates: -1
  AnalysisSet Analyses:
    ProbeReporter: start_time=2.41 end_time=3.48 step_interval=1 in_degrees=true
  ControllerSet Controllers:
    ControlSetController: controls_file=testing_so/Results/SO/model_scaled_StaticOptimization_controls.xml
