# OpenSim document version 30000
InverseKinematicsTool subject01:
  results_directory: ./
  model_file: subject01_simbody.osim
  constraint_weight: 20
  accuracy: 1e-5
  marker_file: subject01_walk1.trc
  time_range: 0.5 2.5
  report_errors: true
  output_motion_file: subject01_walk1_ik.mot
  IKTaskSet:
    IKMarkerTask Clavicle: apply=true weight=1
    IKMarkerTask R_Heel: apply=true weight=10
    IKMarkerTask R_MTP5: apply=true weight=10
    IKMarkerTask R_MTP1: apply=true weight=10
    IKMarkerTask L_Heel: apply=true weight=10
    IKMarkerTask L_MTP5: apply=true weight=10
    IKMarkerTask L_MTP1: apply=true weight=10
    IKMarkerTask R_Thigh_Upper: apply=true weight=1
    IKMarkerTask R_Thigh_Front: apply=true weight=1
    IKMarkerTask R_Thigh_Rear: apply=true weight=1
    IKMarkerTask R_Shank_Upper: apply=true weight=1
    IKMarkerTask R_Shank_Front: apply=true weight=1
    IKMarkerTask R_Shank_Rear: apply=true weight=1
    IKMarkerTask L_Thigh_Upper: apply=true weight=1
    IKMarkerTask L_Thigh_Front: apply=true weight=1
    IKMarkerTask L_Thigh_Rear: apply=true weight=1
    IKMarkerTask L_Shank_Upper: apply=true weight=1
    IKMarkerTask L_Shank_Front: apply=true weight=1
    IKMarkerTask L_Shank_Rear: apply=true weight=1
    IKMarkerTask R_Acromium: apply=true weight=1
    IKMarkerTask L_Acromium: apply=true weight=0.5
    IKMarkerTask R_ASIS: apply=true weight=10
    IKMarkerTask L_ASIS: apply=true weight=10
    IKMarkerTask V_Sacral: apply=true weight=10
    IKCoordinateTask mtp_angle_r: apply=true weight=1000 value_type=default_value value=0
    IKCoordinateTask mtp_angle_l: apply=true weight=1000 value_type=default_value value=0
