# OpenSim document version 20302
IKTool subject01:
  results_directory: ../IKResults
  model_file: ../subject01_gait2392_scaled.osim
  accuracy: 0.00001
  marker_file: ik.trc
  time_range: 0.5 4
  report_errors: true
  output_motion_file: ../IKResults/subject01_walk1_ik.mot
  report_marker_locations: true
  IKTaskSet:
    IKMarkerTask Clavicle: apply=true weight=1
    IKMarkerTask R_Heel: apply=true weight=1
    IKMarkerTask R_MTP5: apply=true weight=1
    IKMarkerTask R_MTP1: apply=true weight=1
    IKMarkerTask L_Heel: apply=true weight=1
    IKMarkerTask L_MTP5: apply=true weight=1
    IKMarkerTask L_MTP1: apply=true weight=1
    IKMarkerTask R_Thigh_Upper: apply=true weight=1
    IKMarkerTask R_Thigh_Front: apply=true weight=1
    IKMarkerTask R_Thigh_Rear: apply=true weight=1
    IKMarkerTask R_Shank_Upper: apply=true weight=1
    IKMarkerTask R_Shank_Front: apply=true weight=1
    IKMarkerTask R_Shank_Rear: apply=true weight=1
    IKMarkerTask L_Thigh_Upper: apply=true weight=1
    IKMarkerTask L_Thigh_Front: apply=true weight=1
    IKMarkerTask L_Thigh_Rear: apply=true weight=1
    IKMarkerTask L_Shank_Upper: apply=true weight=1
    IKMarkerTask L_Shank_Front: apply=true weight=1
    IKMarkerTask L_Shank_Rear: apply=true weight=1
    IKMarkerTask R_Acromium: apply=true weight=5
    IKMarkerTask L_Acromium: apply=true weight=5
    IKMarkerTask R_ASIS: apply=true weight=2
    IKMarkerTask L_ASIS: apply=true weight=2
    IKMarkerTask V_Sacral: apply=true weight=2
