# OpenSim document version 20302
IKTool subject01:
  results_directory: ../IKResults
  model_file: ../subject01_gait2392_scaled.osim
  accuracy: 0.00001
  marker_file: ik.trc
  time_range: 0.5 4
  report_errors: true
  output_motion_file: ../IKResults/subject01_walk1_ik.mot
  report_marker_locations: true
  IKTaskSet:
    IKMarkerTask Clavicle: apply=true weight=1
    IKMarkerTask R.Heel: apply=true weight=1
    IKMarkerTask R.MTP5: apply=true weight=1
    IKMarkerTask R.MTP1: apply=true weight=1
    IKMarkerTask L.Heel: apply=true weight=1
    IKMarkerTask L.MTP5: apply=true weight=1
    IKMarkerTask L.MTP1: apply=true weight=1
    IKMarkerTask R.Thigh.Upper: apply=true weight=1
    IKMarkerTask R.Thigh.Front: apply=true weight=1
    IKMarkerTask R.Thigh.Rear: apply=true weight=1
    IKMarkerTask R.Shank.Upper: apply=true weight=1
    IKMarkerTask R.Shank.Front: apply=true weight=1
    IKMarkerTask R.Shank.Rear: apply=true weight=1
    IKMarkerTask L.Thigh.Upper: apply=true weight=1
    IKMarkerTask L.Thigh.Front: apply=true weight=1
    IKMarkerTask L.Thigh.Rear: apply=true weight=1
    IKMarkerTask L.Shank.Upper: apply=true weight=1
    IKMarkerTask L.Shank.Front: apply=true weight=1
    IKMarkerTask L.Shank.Rear: apply=true weight=1
    IKMarkerTask R.Acromium: apply=true weight=5
    IKMarkerTask L.Acromium: apply=true weight=5
    IKMarkerTask R.ASIS: apply=true weight=2
    IKMarkerTask L.ASIS: apply=true weight=2
    IKMarkerTask V.Sacral: apply=true weight=2
