# OpenSim document version 30000
AnalyzeTool model_scaled:
  model_file: model.osim
  replace_force_set: false
  force_set_files: actuators.xml
  results_directory: ./ResultsSO
  output_precision: 8
  initial_time: 1.34
  final_time: 2.4
  solve_for_equilibrium_for_auxiliary_states: true
  maximum_number_of_integrator_steps: 20000
  maximum_integrator_step_size: 1
  minimum_integrator_step_size: 1e-8
  integrator_error_tolerance: 1e-5
  lowpass_cutoff_frequency_for_coordinates: -1
  AnalysisSet Analyses:
    ProbeReporter MetabolicsReporter
    StaticOptimization: start_time=1.34 end_time=2.4 step_interval=1 in_degrees=true use_model_force_set=true
        activation_exponent=2 use_muscle_physiology=true optimizer_convergence_criterion=0.0001
        optimizer_max_iterations=100
