# OpenSim document version 30000
ScaleTool model_scaled:
  mass: 83 [kg]
  height: 1803.4
  age: 99
  notes: This is an example setup file for scale.exe.
  GenericModelMaker:
    model_file: APO_2354_Metabolics.osim
  ModelScaler:
    apply: true
    scaling_order: measurements manualScale
    marker_file: D:/Dropbox/PhD/HIL Control/Finalised Calorimetry Span/Models/../Processed Data/Static/chris Cal 01.trc
    time_range: 0 2.1
    preserve_mass_distribution: true
    output_model_file: model_scaledOnly.osim
    MeasurementSet gait2354:
      Measurement torso: apply=true
        MarkerPair: markers=(Clavicle V_Sacral)
        BodyScale torso: axes=(X Y Z)
      Measurement pelvis: apply=true
        MarkerPair: markers=(R_ASIS L_ASIS)
        BodyScale pelvis: axes=(X Y Z)
      Measurement thigh: apply=true
        MarkerPair: markers=(RHJC RKJC)
        MarkerPair: markers=(LHJC LKJC)
        BodyScale femur_r: axes=(X Y Z)
        BodyScale femur_l: axes=(X Y Z)
      Measurement shank: apply=true
        MarkerPair: markers=(RKJC RAJC)
        MarkerPair: markers=(LKJC LAJC)
        BodyScale tibia_r: axes=(X Y Z)
        BodyScale talus_r: axes=(X Y Z)
        BodyScale tibia_l: axes=(X Y Z)
        BodyScale talus_l: axes=(X Y Z)
      Measurement foot: apply=true
        MarkerPair: markers=(R_Heel R_MTP1)
        MarkerPair: markers=(L_Heel L_MTP1)
        BodyScale calcn_r: axes=(X Y Z)
        BodyScale toes_r: axes=(X Y Z)
        BodyScale calcn_l: axes=(X Y Z)
        BodyScale toes_l: axes=(X Y Z)
      Measurement Torso_x: apply=false
        MarkerPair: markers=(Clavicle V_Sacral)
    ScaleSet gait2354_Scale:
      Scale: scales=(1.14724 1.14724 1.14724) segment=femur_r apply=false
      Scale: scales=(0.988523 0.988523 0.988523) segment=tibia_r apply=false
      Scale: scales=(1.14724 1.14724 1.14724) segment=femur_l apply=false
      Scale: scales=(0.988523 0.988523 0.988523) segment=tibia_l apply=false
  MarkerPlacer:
    apply: true
    marker_file: D:/Dropbox/PhD/HIL Control/Finalised Calorimetry Span/Models/../Processed Data/Static/chris Cal 01.trc
    time_range: 0.01 2.06
    output_model_file: model_scaled_simbody.osim
    max_marker_movement: -1
    IKTaskSet gait2354_Scale:
      IKMarkerTask Clavicle: apply=true weight=1000
      IKMarkerTask R_Knee_Lat: apply=false weight=1000
      IKMarkerTask R_Knee_Med: apply=false weight=1
      IKMarkerTask R_Ankle_Lat: apply=false weight=1000
      IKMarkerTask R_Ankle_Med: apply=false weight=1
      IKMarkerTask R_Heel: apply=false weight=1000
      IKMarkerTask R_MTP5: apply=false weight=1000
      IKMarkerTask R_MTP1: apply=false weight=1000
      IKMarkerTask L_Knee_Lat: apply=false weight=1000
      IKMarkerTask L_Knee_Med: apply=false weight=1
      IKMarkerTask L_Ankle_Lat: apply=false weight=1000
      IKMarkerTask L_Ankle_Med: apply=false weight=1
      IKMarkerTask L_Heel: apply=false weight=1000
      IKMarkerTask L_MTP5: apply=false weight=1000
      IKMarkerTask L_MTP1: apply=false weight=1000
      IKMarkerTask R_Thigh_Upper: apply=false weight=1
      IKMarkerTask R_Thigh_Front: apply=false weight=1
      IKMarkerTask R_Thigh_Rear: apply=false weight=1
      IKMarkerTask R_Shank_Upper: apply=false weight=1
      IKMarkerTask R_Shank_Front: apply=false weight=1
      IKMarkerTask R_Shank_Rear: apply=false weight=1
      IKMarkerTask L_Thigh_Upper: apply=false weight=1
      IKMarkerTask L_Thigh_Front: apply=false weight=1
      IKMarkerTask L_Thigh_Rear: apply=false weight=1
      IKMarkerTask L_Shank_Upper: apply=false weight=1
      IKMarkerTask L_Shank_Front: apply=false weight=1
      IKMarkerTask L_Shank_Rear: apply=false weight=1
      IKMarkerTask RHJC: apply=true weight=1000
      IKMarkerTask LHJC: apply=true weight=1000
      IKMarkerTask RKJC: apply=true weight=1000
      IKMarkerTask LKJC: apply=true weight=1000
      IKMarkerTask RAJC: apply=true weight=1000
      IKMarkerTask LAJC: apply=true weight=1000
      IKMarkerTask R_Acromium: apply=false weight=1000
      IKMarkerTask L_Acromium: apply=false weight=1000
      IKMarkerTask R_ASIS: apply=false weight=1000
      IKMarkerTask L_ASIS: apply=false weight=1000
      IKMarkerTask V_Sacral: apply=false weight=1000
      IKCoordinateTask pelvis_tilt: apply=true weight=1 value_type=default_value value=0
      IKCoordinateTask pelvis_list: apply=true weight=1 value_type=default_value value=0
      IKCoordinateTask pelvis_rotation: apply=true weight=1 value_type=default_value value=0
      IKCoordinateTask hip_flexion_r: apply=false weight=1000 value_type=default_value value=0
      IKCoordinateTask knee_angle_r: apply=false weight=1000 value_type=default_value value=0
      IKCoordinateTask ankle_angle_r: apply=true weight=1000 value_type=manual_value value=0
      IKCoordinateTask subtalar_angle_r: apply=true weight=1000 value_type=default_value value=0
      IKCoordinateTask mtp_angle_r: apply=true weight=1000 value_type=default_value value=0
      IKCoordinateTask hip_flexion_l: apply=false weight=1000 value_type=default_value value=0
      IKCoordinateTask knee_angle_l: apply=false weight=1000 value_type=default_value value=0
      IKCoordinateTask ankle_angle_l: apply=true weight=1000 value_type=manual_value value=0
      IKCoordinateTask subtalar_angle_l: apply=true weight=1000 value_type=default_value value=0
      IKCoordinateTask mtp_angle_l: apply=true weight=1000 value_type=default_value value=0
      IKCoordinateTask lumbar_extension: apply=false weight=1000 value_type=manual_value value=0
      IKCoordinateTask lumbar_bending: apply=true weight=1 value_type=default_value value=0
      IKCoordinateTask lumbar_rotation: apply=true weight=1 value_type=default_value value=0
