# OpenSim document version 20302
ExternalLoads apo:
  datafile: C:\Users\Daniel\Documents\GitHub\APO-Inverse-Model\Testing\OpenSimTrial\load_change\grf0.mot
  lowpass_cutoff_frequency_for_load_kinematics: 6
  ExternalForce right: applied_to_body=calcn_r force_expressed_in_body=ground point_expressed_in_body=ground
      force_identifier=ground_force_v point_identifier=ground_force_p torque_identifier=ground_torque_
  ExternalForce left: applied_to_body=calcn_l force_expressed_in_body=ground point_expressed_in_body=ground
      force_identifier=1_ground_force_v point_identifier=1_ground_force_p torque_identifier=1_ground_torque_
  ExternalForce apo_right: applied_to_body=APO_r_link force_expressed_in_body=ground point_expressed_in_body=femur_r
      force_identifier=apo_force_v point_identifier=apo_force_p
  ExternalForce apo_left: applied_to_body=APO_l_link force_expressed_in_body=ground point_expressed_in_body=femur_l
      force_identifier=1_apo_force_v point_identifier=1_apo_force_p
