# OpenSim document version 30000
Model model_scaled:
  length_units: meters
  force_units: N
  gravity: 0 -9.80665 0
  credits:
    Delp S.L., Loan J.P., Hoy M.G., Zajac F.E., Topp E.L., Rosen J.M., Thelen D.G., Anderson F.C., Seth A. Notes: 3D, 23 DOF gait model created by D.G. Thelen, Univ. of Wisconsin-Madison, and Ajay Seth, Frank C. Anderson, and Scott L. Delp, Stanford University. Lower extremity joint defintions based on Delp et al. (1990). Low back joint and anthropometry based on Anderson and Pandy (1999, 2001). Planar knee model of Yamaguchi and Zajac (1989). Seth replaced tibia translation constraints with a CustomJoint for the knee and removed the patella to eliminate all kinematic constraints; insertions of the quadrucepts are handled with moving points in the tibia frame as defined by Delp 1990. License: Creative Commons (CCBY 3.0). You are free to distribute, remix, tweak, and build upon this work, even commercially, as long as you credit us for the original creation. http://creativecommons.org/licenses/by/3.0/ More Information: http://simtk-confluence.stanford.edu:8080/display/OpenSim/Gait+2392+and+2354+Models
  publications:
    Delp, S.L., Loan, J.P., Hoy, M.G., Zajac, F.E., Topp E.L., Rosen, J.M.: An interactive graphics-based model of the lower extremity to study orthopaedic surgical procedures, IEEE Transactions on Biomedical Engineering, vol. 37, pp. 757-767, 1990. Yamaguchi G.T., Zajac F.E.: A planar model of the knee joint to characterize the knee extensor mechanism." J . Biomecl7. vol. 21. pp. 1-10. 1989. Anderson F.C., Pandy M.G.: A dynamic optimization solution for vertical jumping in three dimensions. Computer Methods in Biomechanics and Biomedical Engineering 2:201-231, 1999. Anderson F.C., Pandy M.G.: Dynamic optimization of human walking. Journal of Biomechanical Engineering 123:381-390, 2001.
  BodySet:
    Body ground: mass=0 mass_center=(0 0 0) inertia_xx=0 inertia_yy=0 inertia_zz=0 meshes=treadmill.vtp
    Body pelvis: mass=0.2032724 mass_center=(-0.0798336 0 0) inertia_xx=0.1499721 inertia_yy=0.1270678
        inertia_zz=0.08446873 meshes=(sacrum.vtp pelvis.vtp l_pelvis.vtp)
      CustomJoint ground_pelvis: parent_body=ground location_in_parent=(0 0 0) location=(0 0 0)
        Coordinate pelvis_tilt: motion_type=rotational default_value=0 range=(-1.570796 1.570796) clamped=false
        Coordinate pelvis_list: motion_type=rotational default_value=0 range=(-1.570796 1.570796) clamped=false
        Coordinate pelvis_rotation: motion_type=rotational default_value=0 range=(-1.570796 1.570796) clamped=false
        Coordinate pelvis_tx: motion_type=translational default_value=0 range=(-5 5) clamped=false
        Coordinate pelvis_ty: motion_type=translational default_value=0 range=(-1 2) clamped=false
        Coordinate pelvis_tz: motion_type=translational default_value=0 range=(-3 3) clamped=false
        SpatialTransform:
          TransformAxis rotation1: coordinates=pelvis_tilt axis=(0 0 1) LinearFunction(coefficients=1 0)
          TransformAxis rotation2: coordinates=pelvis_list axis=(1 0 0) LinearFunction(coefficients=1 0)
          TransformAxis rotation3: coordinates=pelvis_rotation axis=(0 1 0) LinearFunction(coefficients=1 0)
          TransformAxis translation1: coordinates=pelvis_tx axis=(1 0 0) LinearFunction(coefficients=1 0)
          TransformAxis translation2: coordinates=pelvis_ty axis=(0 1 0) LinearFunction(coefficients=1 0)
          TransformAxis translation3: coordinates=pelvis_tz axis=(0 0 1) LinearFunction(coefficients=1 0)
    Body femur_r: mass=0.1605433 mass_center=(0 -0.171563 0) inertia_xx=0.1560332 inertia_yy=0.04090192
        inertia_zz=0.1645399 meshes=femur.vtp
      CustomJoint hip_r: parent_body=pelvis location_in_parent=(-0.07983357 -0.07463931 0.09428718) location=(0 0 0)
        Coordinate hip_flexion_r: motion_type=rotational default_value=0 range=(-2.094395 2.094395) clamped=false
        Coordinate hip_adduction_r: motion_type=rotational default_value=0 range=(-2.094395 2.094395) clamped=false
        Coordinate hip_rotation_r: motion_type=rotational default_value=0 range=(-2.094395 2.094395) clamped=false
        SpatialTransform: axes_held_at_zero=(translation1 translation2 translation3)
          TransformAxis rotation1: coordinates=hip_flexion_r axis=(0 0 1) LinearFunction(coefficients=1 0)
          TransformAxis rotation2: coordinates=hip_adduction_r axis=(1 0 0) LinearFunction(coefficients=1 0)
          TransformAxis rotation3: coordinates=hip_rotation_r axis=(0 1 0) LinearFunction(coefficients=1 0)
    Body tibia_r: mass=0.06399189 mass_center=(0 -0.199478 0) inertia_xx=0.06582883 inertia_yy=0.006661251
        inertia_zz=0.06674312 meshes=(tibia.vtp fibula.vtp)
      CustomJoint knee_r: parent_body=femur_r location_in_parent=(0 0 0) location=(0 0 0)
        Coordinate knee_angle_r: motion_type=rotational default_value=0 range=(-2.094395 0.1745329) clamped=false
        SpatialTransform: axes_held_at_zero=(rotation2 rotation3 translation3)
          TransformAxis rotation1: coordinates=knee_angle_r axis=(0 0 1) LinearFunction(coefficients=1 0)
          TransformAxis translation1: coordinates=knee_angle_r axis=(1 0 0)
            MultiplierFunction: scale=1.009196
              SimmSpline: x=(-2.0944 -1.74533 -1.39626 -1.0472 -0.698132 -0.349066 -0.174533 0.197344 0.337395 0.490178 1.52146 2.0944)
                  y=(-0.0032 0.00179 0.00411 0.0041 0.00212 -0.001 -0.0031 -0.005227 -0.005435 -0.005574 -0.005435 -0.00525)
          TransformAxis translation2: coordinates=knee_angle_r axis=(0 1 0)
            MultiplierFunction: scale=1.009196
              SimmSpline: x=(-2.0944 -1.22173 -0.523599 -0.349066 -0.174533 0.159149 2.0944)
                  y=(-0.4226 -0.4082 -0.399 -0.3976 -0.3966 -0.395264 -0.396)
    Body talus_r: mass=0.001726013 mass_center=(0 0 0) inertia_xx=0.001306128 inertia_yy=0.001306128
        inertia_zz=0.001306128 meshes=talus.vtp
      CustomJoint ankle_r: parent_body=tibia_r location_in_parent=(0 -0.4594293 0) location=(0 0 0)
        Coordinate ankle_angle_r: motion_type=rotational default_value=0 range=(-1.570796 1.570796) clamped=false
        SpatialTransform: axes_held_at_zero=(rotation2 rotation3 translation1 translation2 translation3)
          TransformAxis rotation1: coordinates=ankle_angle_r axis=(-0.1050135 -0.1740224 0.9791263)
              LinearFunction(coefficients=1 0)
    Body calcn_r: mass=0.02157515 mass_center=(0.111596 0.0334788 0) inertia_xx=0.001994856 inertia_yy=0.0055571
        inertia_zz=0.005842079 meshes=foot.vtp
      CustomJoint subtalar_r: parent_body=talus_r location_in_parent=(-0.05210783 -0.04482107 0.008462047)
          location=(0 0 0)
        Coordinate subtalar_angle_r: motion_type=rotational default_value=1.393122e-10 range=(-1.570796 1.570796)
            clamped=false locked=true
        SpatialTransform: axes_held_at_zero=(rotation2 rotation3 translation1 translation2 translation3)
          TransformAxis rotation1: coordinates=subtalar_angle_r axis=(0.7871796 0.6047475 -0.1209495)
              LinearFunction(coefficients=1 0)
    Body toes_r: mass=0.003738542 mass_center=(0.0386123 0.00669577 -0.0195293) inertia_xx=0.0001424897
        inertia_yy=0.0002849795 inertia_zz=0.0001424897 meshes=bofoot.vtp
      CustomJoint mtp_r: parent_body=calcn_r location_in_parent=(0.1995339 -0.002231923 0.001205238) location=(0 0 0)
        Coordinate mtp_angle_r: motion_type=rotational default_value=0 range=(-1.570796 1.570796) clamped=false
            locked=true
        SpatialTransform: axes_held_at_zero=(rotation2 rotation3 translation1 translation2 translation3)
          TransformAxis rotation1: coordinates=mtp_angle_r axis=(-0.5809544 0 0.8139361)
              LinearFunction(coefficients=1 0)
    Body femur_l: mass=0.1605433 mass_center=(0 -0.171563 0) inertia_xx=0.1560332 inertia_yy=0.04090192
        inertia_zz=0.1645399 meshes=l_femur.vtp
      CustomJoint hip_l: parent_body=pelvis location_in_parent=(-0.07983357 -0.07463931 -0.09428718) location=(0 0 0)
        Coordinate hip_flexion_l: motion_type=rotational default_value=0 range=(-2.094395 2.094395) clamped=false
        Coordinate hip_adduction_l: motion_type=rotational default_value=0 range=(-2.094395 2.094395) clamped=false
        Coordinate hip_rotation_l: motion_type=rotational default_value=0 range=(-2.094395 2.094395) clamped=false
        SpatialTransform: axes_held_at_zero=(translation1 translation2 translation3)
          TransformAxis rotation1: coordinates=hip_flexion_l axis=(0 0 1) LinearFunction(coefficients=1 0)
          TransformAxis rotation2: coordinates=hip_adduction_l axis=(-1 0 0) LinearFunction(coefficients=1 0)
          TransformAxis rotation3: coordinates=hip_rotation_l axis=(0 -1 0) LinearFunction(coefficients=1 0)
    Body tibia_l: mass=0.06399189 mass_center=(0 -0.199478 0) inertia_xx=0.06582883 inertia_yy=0.006661251
        inertia_zz=0.06674312 meshes=(l_tibia.vtp l_fibula.vtp)
      CustomJoint knee_l: parent_body=femur_l location_in_parent=(0 0 0) location=(0 0 0)
        Coordinate knee_angle_l: motion_type=rotational default_value=0 range=(-2.094395 0.1745329) clamped=false
        SpatialTransform: axes_held_at_zero=(rotation2 rotation3 translation3)
          TransformAxis rotation1: coordinates=knee_angle_l axis=(0 0 1) LinearFunction(coefficients=1 0)
          TransformAxis translation1: coordinates=knee_angle_l axis=(1 0 0)
            MultiplierFunction: scale=1.009196
              SimmSpline: x=(-2.0944 -1.74533 -1.39626 -1.0472 -0.698132 -0.349066 -0.174533 0.197344 0.337395 0.490178 1.52146 2.0944)
                  y=(-0.0032 0.00179 0.00411 0.0041 0.00212 -0.001 -0.0031 -0.005227 -0.005435 -0.005574 -0.005435 -0.00525)
          TransformAxis translation2: coordinates=knee_angle_l axis=(0 1 0)
            MultiplierFunction: scale=1.009196
              SimmSpline: x=(-2.0944 -1.22173 -0.523599 -0.349066 -0.174533 0.159149 2.0944)
                  y=(-0.4226 -0.4082 -0.399 -0.3976 -0.3966 -0.395264 -0.396)
    Body talus_l: mass=0.001726013 mass_center=(0 0 0) inertia_xx=0.001306128 inertia_yy=0.001306128
        inertia_zz=0.001306128 meshes=l_talus.vtp
      CustomJoint ankle_l: parent_body=tibia_l location_in_parent=(0 -0.4594293 0) location=(0 0 0)
        Coordinate ankle_angle_l: motion_type=rotational default_value=0 range=(-1.047198 1.047198) clamped=false
        SpatialTransform: axes_held_at_zero=(rotation2 rotation3 translation1 translation2 translation3)
          TransformAxis rotation1: coordinates=ankle_angle_l axis=(0.1050135 0.1740224 0.9791263)
              LinearFunction(coefficients=1 0)
    Body calcn_l: mass=0.02157515 mass_center=(0.111596 0.0334788 0) inertia_xx=0.001994856 inertia_yy=0.0055571
        inertia_zz=0.005842079 meshes=l_foot.vtp
      CustomJoint subtalar_l: parent_body=talus_l location_in_parent=(-0.05210783 -0.04482107 -0.008462047)
          location=(0 0 0)
        Coordinate subtalar_angle_l: motion_type=rotational default_value=4.398544e-9 range=(-1.570796 1.570796)
            clamped=false locked=true
        SpatialTransform: axes_held_at_zero=(rotation2 rotation3 translation1 translation2 translation3)
          TransformAxis rotation1: coordinates=subtalar_angle_l axis=(-0.7871796 -0.6047475 -0.1209495)
              LinearFunction(coefficients=1 0)
    Body toes_l: mass=0.003738542 mass_center=(0.0386123 0.00669577 0.0195293) inertia_xx=0.0001424897
        inertia_yy=0.0002849795 inertia_zz=0.0001424897 meshes=l_bofoot.vtp
      CustomJoint mtp_l: parent_body=calcn_l location_in_parent=(0.1995339 -0.002231923 -0.001205238) location=(0 0 0)
        Coordinate mtp_angle_l: motion_type=rotational default_value=0 range=(-1.047198 1.047198) clamped=false
            locked=true
        SpatialTransform: axes_held_at_zero=(rotation2 rotation3 translation1 translation2 translation3)
          TransformAxis rotation1: coordinates=mtp_angle_l axis=(0.5809544 0 0.8139361)
              LinearFunction(coefficients=1 0)
    Body torso: mass=0.5909278 mass_center=(0.00723384 0.365582 0.0532869) inertia_xx=2.201915 inertia_yy=1.128211
        inertia_zz=2.137552 meshes=(hat_spine.vtp hat_jaw.vtp hat_skull.vtp hat_ribs.vtp)
      CustomJoint back: parent_body=pelvis location_in_parent=(-0.1137092 0.0920288 0) location=(0 0 0)
        Coordinate lumbar_extension: motion_type=rotational default_value=0 range=(-1.570796 1.570796) clamped=false
        Coordinate lumbar_bending: motion_type=rotational default_value=0 range=(-1.570796 1.570796) clamped=false
        Coordinate lumbar_rotation: motion_type=rotational default_value=0 range=(-1.570796 1.570796) clamped=false
        SpatialTransform: axes_held_at_zero=(translation1 translation2 translation3)
          TransformAxis rotation1: coordinates=lumbar_extension axis=(0 0 1) LinearFunction(coefficients=1 0)
          TransformAxis rotation2: coordinates=lumbar_bending axis=(1 0 0) LinearFunction(coefficients=1 0)
          TransformAxis rotation3: coordinates=lumbar_rotation axis=(0 1 0) LinearFunction(coefficients=1 0)
    Body APO_backpack: mass=2 mass_center=(-0.2233 -0.0001427 0.01862) inertia_xx=0.01047137 inertia_yy=0.1173287
        inertia_zz=0.1250115 inertia_xy=6.478212e-7 inertia_xz=-0.002028828 inertia_yz=1.204587e-5
        meshes=backpack_2.STL
      WeldJoint APO_backpack_pelvis: parent_body=pelvis location_in_parent=(-0.2701292 -0.09192743 0)
          orientation_in_parent=(1.57 1.57 3.14) location=(0 0 0)
    Body APO_group_r: mass=1.42534 mass_center=(-0.04727 0.08198 -0.1371) inertia_xx=0.04202776 inertia_yy=0.03641267
        inertia_zz=0.01747125 inertia_xy=0.00431944 inertia_xz=-0.006984708 inertia_yz=0.0177558 meshes=group_dx.stl
      WeldJoint APO_r: parent_body=APO_backpack location_in_parent=(0 -0.1 0.16) orientation_in_parent=(0 0 1.57)
          location=(0 0 0)
    Body APO_group_l: mass=1.42534 mass_center=(-0.04727 0.08198 0.1371) inertia_xx=0.04202776 inertia_yy=0.03641267
        inertia_zz=0.01747125 inertia_xy=-0.0009783713 inertia_xz=-0.001877069 inertia_yz=-0.00238641
        meshes=group_sx.stl
      WeldJoint APO_l: parent_body=APO_backpack location_in_parent=(0 0.1 0.16) orientation_in_parent=(3.141 0 1.57)
          location=(0 0 0)
    Body APO_r_link: mass=1.34623 mass_center=(-0.026978 0.1463 0.02941) inertia_xx=0.003961858 inertia_yy=0.0006293256
        inertia_zz=0.003826793 inertia_xy=0.00077141 inertia_xz=0.0002251724 inertia_yz=-0.0008285093
        meshes=link_dx.STL
      WeldJoint APO_lower_r: parent_body=femur_r location_in_parent=(-0.0303 -0.0173 0.096)
          orientation_in_parent=(0 3.141 3.141) location=(0 0 0)
    Body APO_l_link: mass=1.34623 mass_center=(-0.02698 0.1463 -0.02941) inertia_xx=0.003959961 inertia_yy=0.0006293256
        inertia_zz=0.003826793 inertia_xy=0.0007714289 inertia_xz=-0.0002251724 inertia_yz=0.0008285093
        meshes=link_sx.STL
      WeldJoint APO_lower_l: parent_body=femur_l location_in_parent=(-0.0303 -0.0173 -0.096)
          orientation_in_parent=(0 3.141 3.141) location=(0 0 0)
  MarkerSet:
    Marker Clavicle: torso (0.1099 0.35925 0.0119527)
    Marker R.Acromium: torso (-0.0293006 0.446083 0.191832)
    Marker L.Acromium: torso (-0.032022 0.456269 -0.174188)
    Marker C7: torso (-0.163989 0.284497 0.00210058)
    Marker R.ASIS: pelvis (0.0397373 0.0239238 0.145252)
    Marker L.ASIS: pelvis (0.0149843 0.00593189 -0.14547)
    Marker V.Sacral: pelvis (-0.296053 -0.000336772 -0.00132496)
    Marker R.Thigh.Upper: femur_r (0.132676 -0.135698 0.0399959)
    Marker R.Thigh.Front: femur_r (0.111647 -0.247103 -0.00623887)
    Marker R.Thigh.Rear: femur_r (0.0819993 -0.252226 0.0621904)
    Marker R.Knee.Lat: femur_r (0.000872466 -0.393399 0.0646658)
    Marker R.Knee.Med: femur_r (0.0198377 -0.390143 -0.0662199)
    Marker R.Shank.Upper: tibia_r (0.0328111 -0.192568 0.0557194)
    Marker R.Shank.Front: tibia_r (0.0382458 -0.308886 0.0118568)
    Marker R.Shank.Rear: tibia_r (-0.0144183 -0.309749 0.0658734)
    Marker R.Ankle.Lat: tibia_r (-0.0216644 -0.429244 0.054918)
    Marker R.Ankle.Med: tibia_r (0.000722318 -0.408043 -0.0399152)
    Marker R.Heel: calcn_r (-0.0330215 0.0280711 -0.00554833)
    Marker R.MTP5: calcn_r (0.182748 0.0225204 0.0482686)
    Marker R.MTP1: calcn_r (0.202299 0.035093 -0.0346777)
    Marker L.Thigh.Upper: femur_l (0.111096 -0.132132 -0.0200151)
    Marker L.Thigh.Front: femur_l (0.101866 -0.252688 0.0165468)
    Marker L.Thigh.Rear: femur_l (0.0800219 -0.249056 -0.0527305)
    Marker L.Knee.Lat: femur_l (-0.00112303 -0.397713 -0.0557989)
    Marker L.Knee.Med: femur_l (0.0347501 -0.400669 0.0686917)
    Marker L.Shank.Upper: tibia_l (0.0100014 -0.193496 -0.0691806)
    Marker L.Shank.Front: tibia_l (0.037854 -0.308651 -0.0296681)
    Marker L.Shank.Rear: tibia_l (-0.0303728 -0.309523 -0.0580125)
    Marker L.Ankle.Lat: tibia_l (-0.0236539 -0.42249 -0.0596571)
    Marker L.Ankle.Med: tibia_l (0.0126266 -0.41263 0.0278863)
    Marker L.Heel: calcn_l (-0.0229797 0.0244525 0.00964112)
    Marker L.MTP5: calcn_l (0.184484 0.018877 -0.0532858)
    Marker L.MTP1: calcn_l (0.205796 0.039101 0.0350779)
